h11 := 940
h12 := 0.000154
h22 := 0.0000307
h21 := 199
Uпит := 18
Uкэ := Uпит/2 = 9
Rк := 1800
Iк := Uкэ/Rк = 0.005
Iб := Iк/h21 = 2.51256e-5
Urб := Uпит - 707.66*10^-3
Rб := Urб/Iб = 688235
h21 := 5.3305*10^-3/(25.43*10^-6) = 209.615
Rэ := Rк*10*% = 180
Uкэ := 8.405
Iк := (Uпит - Uкэ)/(Rк + (1 + 1/h21)*Rэ) = 0.00484386
Iб := Iк/h21 = 2.31084e-5
2*Iк^2*Rк = 0.0844667
Iэ := (1 + 1/h21)*Iк = 0.00486697
2*Iэ^2*Rэ = 0.00852745
Iэ*Rэ = 0.876054
Rб := Rэ*h21/10 = 3773.06
Uб := Iэ*Rэ + 707.66*10^-3 = 1.58371
Rб1 := Rб*Uпит/Uб = 42883.5
Rб2 := Rб/(1 - Uб/Uпит) = 4137.06
2*Iб^2*Rб1 = 4.57994e-5
h21 := 5.228*10^-3/(25.17*10^-6) = 207.708
Uкэ := 9.59
h11 := 30*h21/(1000*Iэ) = 1280.31
Ky0 := -h21*Rк/h11 = -292.018
Rн := 1900
Ky := h21*Rк*Rн/(Rк + Rн)/(h11 + (1 + h21)*150) = 5.89169
h21*Rк*Rн/(Rк + Rн)/(h11 + (1 + h21)*30) = 25.4576
3/(18*10^-3) = 166.667
25.458*5.892 = 149.999
(1.6654 - 1.4281)/2/(18*10^-3) = 6.59167
6.592*24.779 = 163.343
(3 + 2.88)/2/((1.6654 - 1.4281)/2) = 24.7788
(1.6654 - 1.4281)/2 = 0.11865
(3 + 2.88)/2 = 2.94
C := 1/(2*π*Rн*180*(sqrt(2)/2)) = 6.58126e-7
3.02*sqrt(2)/2 = 2.13546
